OpenVSP model (file version 5), 1 components.
Geometry view with OpenVSP parameter names; values to 6 digits, angles in degrees, lengths in the model's unit.
Overall bounding box: X_Min=0 X_Len=31.1359 Y_Min=-12.9698 Y_Len=25.9397 Z_Min=-0.442794 Z_Len=0.885589

Wing "WingGeom"
  location (X Y Z) 0 0 0, rotation 0 0 0
  symmetric about XZ
  bounding box size 31.1359 25.9397 0.885589
  totals: TotalSpan=25.9144 TotalProjectedSpan=25.9144 TotalChord=12.6593 TotalArea=363.016 TotalAR=1.84994
  root: chord 29.475, twist 0, NACA 4-series Camber=0 CamberLoc=0.2 ThickChord=0.03
  sections:
    n   Span      Root_Chord  Tip_Chord  Area     Sweep  Sweep_Location  Dihedral  Twist  Twist_Location  tip airfoil
    1   1.33557   29.475      24.8776    36.2959  74.35  0               0         0      0.25            as above
    2   1.38207   24.8776     20.6927    31.4907  72.77  0               0         0      0.25            as above
    3   0.691037  20.6927     18.8163    13.6511  70.1   0               0         0      0.25            as above
    4   0.691037  18.8163     17.0875    12.4054  68.11  0               0         0      0.25            as above
    5   0.691037  17.0875     15.5379    11.2727  66.36  0               0         0      0.25            as above
    6   0.691037  15.5379     14.1676    10.2638  62.99  0               0         0      0.25            as above
    7   0.691037  14.1676     12.9659    9.3751   60.04  0               0         0      0.25            as above
    8   0.691037  12.9659     11.9117    8.59567  57.55  0               0         0      0.25            as above
    9   0.691037  11.9117     10.963     7.90364  55.31  0               0         0      0.25            as above
    10  0.691037  10.963      10.067     7.26625  55.43  0               0         0      0.25            as above
    11  0.691037  10.067      9.2026     6.658    54.37  0               0         0      0.25            as above
    12  0.691037  9.2026      8.34875    6.06432  54.27  0               0         0      0.25            as above
    13  0.691037  8.34875     7.48436    5.47063  54.78  0               0         0      0.25            as above
    14  0.691037  7.48436     6.61997    4.87331  55.78  0               0         0      0.25            as above
    15  0.691037  6.61997     5.70287    4.25777  57.1   0               0         0      0.25            as above
    16  0.691037  5.70287     4.58549    3.55482  61.38  0               0         0      0.25            as above
    17  0.56505   4.58549     2.87779    2.10856  73.68  0               0         0      0.25            NACA 4-series Camber=0 CamberLoc=0.2 ThickChord=0.02

VSPAERO settings: Sref=363.016 bref=25.9144 cref=12.6593 Xcg=0 Ycg=0 Zcg=0 AlphaStart=0 AlphaEnd=10 AlphaNpts=1 BetaStart=0 BetaEnd=0 BetaNpts=1 MachStart=1.6 MachEnd=0 MachNpts=1 ReCref=1e+07 Vinf=100 Rho=0.002377
